# Saturated Transistor Circuit
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# Specifications :
# 1) V_IN < 0.05V, V_OUT > 10V at I_OUT = 1 mA
# 2) V_IN = 12V, V_OUT < 0.4V at I_SINK < 10mA
#
# Assume transistor beta β := 50
# The lower limit of R_C is set by spec #1
# R_C >(12 V - 10 V)/(1*10^-3*A) = 2000 Ω
# The upper limit of R_B is set by spec #2
# Need to assume a value for R_C := 2*10^3*Ω
# Collector current I_C := 12 V/R_C + 10*10^-3*A
R_B := (12 V - 0.6 V)/(I_C/β)
R_B = 35625 Ω
