# Transistor Amplifier
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# Specifications:
# 1) AC signal gain G := 4
# 2) AC peak-to-peak signal swing of 4 volts
# 3) DC bias point V_out_dc := 8 V
# Emitter voltage: V_E_dc := 4 V
# Collector bias current I_C := 10*10^-3*A
# 5) Transistor Beta at the I_C given β := 100
# Collector resistor should be selected to provide the given bias:
R_C := (12 V - V_out_dc)/I_C
R_C = 400 Ω
# The sum of the emitter resistance provides bias for the emitter voltage:
# RE1 + RE2 = R_E_sum := V_E_dc/I_C
R_E_sum = 400 Ω
# R_1 and R_2 sets the DC bias on the base side:
V_B_dc := V_E_dc + 0.6 V
V_B_dc = 4.6 V
I_β_dc := I_C/β
I_β_dc = 0.0001 A
# Choose a R_2: R_2 := 8*10^3*Ω
# Give R1 a starting value:
# R_1 := 1 Ω
Given
(V_B_dc - 12 V)/R_1 + V_B_dc/R_2 + I_β_dc == 0
Find(R_1) = 10963 Ω
# The signal gain is collector resistance divided by emitter resistance:
R_E1 := R_C/G
R_E1 = 100 Ω
R_E2 := R_E_sum - R_E1
R_E2 = 300 Ω
# The bypass capacitors will depend on frequency response required. The book's suggested starting values are:
C_IN := 10*10^-6*F
C_E := 1000*10^-6*F
