# Inverting Amplifier T-Network Design Example
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# Specifications:
#
# Input resistance = R_1 := 10*10^3
# Gain = G := -100
# Feedback resistance < 20K
# Use:
R_2 := 10*10^3
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R_4 := 10*10^3
# Since R_2 + R_4 is 20k, feedback resistance including R_3 should be below 20K.
#
# Now need to find R_3.
# Guess here:
R_3 := 485*10^3
# Iterate until G = -100
R_TH := (1/R_3 + 1/R_4)^-1
R_TH = 9797.98
V_IN := 0.01
V_TH := V_IN*(-(R_TH + R_2)/R_1)
V_TH = -0.019798
V_OUT := 1
Given
V_TH == V_OUT*R_4/(R_3 + R_4)
G == V_OUT/V_IN
Find(V_OUT, G) = [-0.98; -98]
