# Amplifier Design: V_OUT = +m V_IN - b
# Specification:
#
# V_IN1 := 0.2  V_OUT1 := 1.5
# V_IN2 := 0.5  V_OUT2 := 4.5  V_REF := 5
#
# all units are in volts
Given
m := 1
b := 1
V_OUT1 == m*V_IN1 + b
V_OUT2 == m*V_IN2 + b
Find(m, b) = [10; -0.5]
m := 10
b := -0.5
# Implementation Circuit:
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# V_OUT is a combination of:
V_IN*(1 + R_F/(R_G + R_para))  # where R_para is R_1 || R_2
and
V_REF*(R_2/(R_1 + R_2))*(-R_F/(R_G + R_para))  # where R_G + R_para is the thevenin resistance of V_REF
# Assume R_G >> R_para
# let x_1 =
1 + R_F/(R_G + R_para)
# let x_2 =
R_2/(R_1 + R_2)
-R_F/(R_G + R_para)  # would be 1-x_1
Given
x_1 := 1
x_2 := 1
m == x_1
b == V_REF*x_2*(1 - x_1)
Find(x_1, x_2) = [10; 0.0111111]
x_1 := 10
x_2 := 0.011
x_1 == 1 + R_F/(R_G + R_para)  # becomes
x_1 == 1 + R_F/R_G  # due to R_G >> R_para
x_1 == 1 + R_F/R_G
# solve for R_F =
(x_1 - 1)*R_G
x_1 - 1 = 9
R_F == 9*R_G
x_2 == R_2/(R_1 + R_2)
# solve for R_1 =
(-R_2)*(x_2 - 1)/x_2
(x_2 - 1)/x_2 = -89.9091
R_1 == 89.909*R_2
