# Amplifier Design: V_OUT = +m V_IN + b
# Circuit specification:
#
# V_OUT = 1 at V_IN = 0.01V
# V_OUT = 4.5 at V_IN = 1V
# R_L = 10 kOhm
# V_CC = V_REF = 5V
V_IN1 := 0.01
V_OUT1 := 1
V_IN2 := 1
V_OUT2 := 4.5
Given
m := 1
b := 1
V_OUT1 == m*V_IN1 + b
V_OUT2 == m*V_IN2 + b
Find(m, b) = [3.53535; 0.964646]
m := 3.535
b := 0.965
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# Implementation Circuit:
V_IN := 0.1
R_1 := 1
R_2 := 1
R_3 := 1
R_F := 1
R_G := 1
V_REF := 5
V_OUT := V_IN*R_2/(R_1 + R_2)*(1 + R_F/R_G) + V_REF*R_1/(R_1 + R_2)*(1 + R_F/R_G)
x_1 := R_2/(R_1 + R_2)
x_2 := 1 + R_F/R_G
Given
m == x_1*x_2
b == V_REF*(1 - x_1)*x_2
Find(x_1, x_2) = [0.948229; 3.728]
x_1 := 0.948
x_2 := 3.728
x_1 == R_2/(R_1 + R_2)
# Solve for R_1:
(-R_2)*(x_1 - 1)/x_1
(x_1 - 1)/x_1 = -0.0548523  # R_1 = 0.055 R_2
x_2 == 1 + R_F/R_G
# Solve for R_F:
(x_2 - 1)*R_G
x_2 - 1 = 2.728  # R_F = 2.728 R_G
