# Impedance of this network:
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R_1 := 91
C_1 := 10*10^-6
R_G := 1*10^3
Z_1(s) := R_1 + 1/(C_1*s)
Z(s) := (1/Z_1(s) + 1/R_G)^-1
Z(100) = 521.76
Z(10000) = 91.7348
Z(16.1*10^3) = 88.5984
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